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/batch
! ANSYS input file written by Workbench version 2022 R1
! File used for geometry attach: E:\Part005_1.stp
/title,Fusalarge analysis--Static Structural (B5)
/com,--- Data in consistent NMM units. See Solving Units in the help system for more information.
/units,MPA
/prep7
! Turn off shape checking because checks already performed inside WB mesher.
! See help system for more information.
SHPP,OFF,,NOWARN
etcon,set             ! allow ANSYS to choose best KEYOP's for 180x elements, resets any applicable keyopt to MAPDL defaults
/com,*********** Nodes for the whole assembly ***********
nblock,3,,20995
(1i9,3e20.9e3)
        1     5.000000000E+00    -6.951670310E+01     1.272494715E+02
        2     5.000000000E+00     6.951670310E+01    -1.272494715E+02
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-1
/com,*********** Elements for Body 1 "Part005_1-FreeParts|PartBody" ***********
et,1,187
eblock,19,solid,,9565
(19i9)
        1        1        1        1        0        0        0        0       10        0        1     2154     2161     3084     2165    15612    15677    15615    15613
    15672    15705
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-1
/com,*********** Send User Defined Coordinate System(s) ***********
csys,0
toffst,273.15,  ! Temperature offset from absolute zero
/com,*********** Set Reference Temperature ***********
tref,22.
/com,*********** Send Materials ***********
MP,DENS,1,2.713e-09,	! tonne mm^-3
MP,EX,1,69040,	! tonne s^-2 mm^-1
MP,NUXY,1,0.33,
MP,ALPX,1,2.278e-05,	! C^-1
MP,KXX,1,155.3,	! tonne mm s^-3 C^-1
MP,C,1,915700000,	! mm^2 s^-2 C^-1

!************************* Model Summary ********************
!Part005_1-FreeParts|PartBody,	Aluminum alloy, wrought, 6061, T6,	matid,	1
!************************* End Model Summary ********************
CMBLOCK,_CM2943_FIXEDSU,NODE,      991
(8i10)
         1         2         3         4         5         6         7         8
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/com,*********** Fixed Supports ***********
CMBLOCK,_FIXEDSU,NODE,      991
(8i10)
         1         2         3         4         5         6         7         8
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cmsel,s,_FIXEDSU
d,all,all
nsel,all
/com,*********** Define Pressure Using Surface Effect Elements "Pressure" ***********
et,2,154
eblock,10,,,1124
(15i9)
    15838        2        2        2        0     1110      307     2273     2273     5502     5506     2273    11319
    15839        2        2        2        0     1816      257     2275     2275     5125     5127     2275    14193
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-1
esel,s,type,,2
keyop,2,7,0                ! Use deformed area for application of load
esel,all
esel,all
fini
/com,****************************************************************************
/com,*************************    SOLUTION       ********************************
/com,****************************************************************************
/solu
antype,0                   ! static analysis
_thickRatio=  0     ! Ratio of thick parts in the model
eqsl,sparse,,,,,1
cntr,print,1               ! print out contact info and also make no initial contact an error
nldiag,cont,iter           ! print out contact info each equilibrium iteration
rescontrol,linear,last           ! Turn on restart files due to future eigen analysis intent
/com,****************************************************
/com,******************* SOLVE FOR LS 1 OF 1 ****************
esel,s,type,,2
nsle
sf,all,pres,5.e-002
nsel,all
esel,all
esel,all
nsub,1,1,1
time,1.
outres,erase
outres,all,none
outres,nsol,all,
outres,rsol,all
outres,eangl,all
outres,etmp,all
outres,veng,all
outres,strs,all,
outres,epel,all,
outres,eppl,all,
outres,cont,all,
! *********** WB SOLVE COMMAND ***********
! check interactive state
*get,ANSINTER_,active,,int
*if,ANSINTER_,ne,0,then
/eof
*endif
solve
/com *************** Write FE CONNECTORS *********
CEWRITE,file,ce,,INTE
/com,****************************************************
/com,*************** FINISHED SOLVE FOR LS 1 *************
/post1
fini
