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/batch
! ANSYS input file written by Workbench version 2022 R1
/assign,rstp,file,rst              ! Force Eigen analysis to write to file.rst because WB expects it
/solu
antype,,restart,,,perturbation
/title,Fusalarge analysis--Eigenvalue Buckling (C5)
perturb,buckle,,CURRENT,ALLKEEP                    ! linear buckling analysis keeping loads from pre-stress analysis
solve, elform                                       ! Generate matrices needed for perturbation analysis
bucopt,lanb,2,,,center
outres,erase
outres,all,none
outres,nsol,all
outres,etmp,all
mxpand                    ! default expand in case of complex solution
! *********** WB SOLVE COMMAND ***********
! check interactive state
*get,ANSINTER_,active,,int
*if,ANSINTER_,ne,0,then
/eof
*endif
solve
/com *************** Write FE CONNECTORS *********
CEWRITE,file,ce,,INTE
*get,_nmodalsolproc,active,0,numcpu
fini
/post1
fini
